*HEADING
utility semantics probe
*NODE
1, 0.0, 0.0, 0.0
2, 1.0, 0.0, 0.0
3, 1.0, 1.0, 0.0
4, 0.0, 1.0, 0.0
5, 0.0, 0.0, 1.0
6, 1.0, 0.0, 1.0
7, 1.0, 1.0, 1.0
8, 0.0, 1.0, 1.0
*ELEMENT, TYPE=C3D8, ELSET=ONE
1, 1, 2, 3, 4, 5, 6, 7, 8
*SOLID SECTION, ELSET=ONE, MATERIAL=M
*MATERIAL, NAME=M
*DEPVAR
1,
*USER MATERIAL, CONSTANTS=2
1000.0, 0.3
*STEP, NLGEOM=NO
*STATIC
1.0, 1.0
*BOUNDARY
1, 1, 1, 0.0
1, 2, 2, 0.0
1, 3, 3, 0.0
2, 1, 1, 0.01
2, 2, 2, 0.0
2, 3, 3, 0.002
3, 1, 1, 0.014
3, 2, 2, -0.003
3, 3, 3, 0.002
4, 1, 1, 0.004
4, 2, 2, -0.003
4, 3, 3, 0.0
5, 1, 1, 0.002
5, 2, 2, 0.001
5, 3, 3, 0.006
6, 1, 1, 0.012
6, 2, 2, 0.001
6, 3, 3, 0.008
7, 1, 1, 0.016
7, 2, 2, -0.002
7, 3, 3, 0.008
8, 1, 1, 0.006
8, 2, 2, -0.002
8, 3, 3, 0.006
*END STEP
