*HEADING
p
*NODE
1, 0.0, 0.0
2, 1.0, 0.0
3, 1.0, 1.0
4, 0.0, 1.0
*ELEMENT, TYPE=CPE4, ELSET=ONE
1, 1, 2, 3, 4
*SOLID SECTION, ELSET=ONE, MATERIAL=M
*MATERIAL, NAME=M
*DEPVAR
1,
*USER MATERIAL, CONSTANTS=2
1000.0, 0.3
*STEP, NLGEOM=NO
*STATIC
1.0, 1.0
*BOUNDARY
1, 1, 1, 0.0
1, 2, 2, 0.0
2, 1, 1, 0.01
2, 2, 2, 0.002
3, 1, 1, 0.014
3, 2, 2, -0.004
4, 1, 1, 0.004
4, 2, 2, -0.006
*END STEP
